x := transpose([-1, 0, 1])
y := transpose([-1, 0, 1])
R := 1
x[0]^2 + y[0]^2 ≤ R^2 = 0
x[1]^2 + y[0]^2 ≤ R^2 = 1
x[2]^2 + y[0]^2 ≤ R^2 = 0
x[0]^2 + y[1]^2 ≤ R^2 = 1
x[1]^2 + y[1]^2 ≤ R^2 = 1
x[2]^2 + y[1]^2 ≤ R^2 = 1
x[0]^2 + y[2]^2 ≤ R^2 = 0
x[1]^2 + y[2]^2 ≤ R^2 = 1
x[2]^2 + y[2]^2 ≤ R^2 = 0
y1(x) := sqrt(R^2 - x^2)
y2(x) := -sqrt(R^2 - x^2)
x := -1, -0.9999 .. 1
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i := 1
a[i] := 10
a[i + 1] := (a[i] + 1/a[i])*0.5
a[i + 1] = 5.05
|1 - a[1]| < 10^-4
|1 - a[1]| = 9
i := 2
a[i + 1] := (a[i] + 1/a[i])*0.5
a[i + 1] = 2.62401
|1 - a[i + 1]| < 10^-4
|1 - a[i + 1]| = 1.62401
